// Exercise

// tasks:

  // Attach a house object to node 4 phase B.
  // What is the difference between implicit enduses and explicit enduses in residential module?

  // By default, houses have end-uses and appliances implicitly included, but you can also choose to add extra
  // details by adding an explicit model which includes some features that may be absent from the implicit model


  // Requirements:
    // Simulation time = one day.
    // Timestep = Every 5 minutes
    // Record Voltage, current, and power (both watts and VA) on the triplex section of the feeder

  // Water heater parameters:
    // location is inside the house.
    // water temperature 120 F.
    // type Electric water heater
    // Volume 50 Gallons
    // Deadband = 2F
    // Capacity 4.5 kW
    // Water demand 0.5 gallon per minute (gpm)
    // inlet water temperature 60 F
    // tank_UA 3.3

  // Triplex objects parameters:
    // line lengths = 0, nominal voltages = 120 Volts,


// Configuration objects are already set up.

// After adding the water heater, run the file in both FBS and NR. What is the difference?
// FBS - radial systems, faster. NR: radial & mesh, slower


#set profiler=1
module tape;
module powerflow;
module generators;
module residential {
	implicit_enduses NONE;
  //implicit_enduses LIGHTS|PLUGS|OCCUPANCY|DISHWASHER|MICROWAVE|FREEZER|REFRIGERATOR|RANGE|EVCHARGER|WATERHEATER|CLOTHESWASHER|DRYER;
};


class player {
    double value;
}


clock {
	timestamp '2021-12-25 00:00:00';
	stoptime '2021-12-25 23:59:00';
	timezone PST8;
}
// IEEE 4 Node Feeder: Balanced step-down delta-delta

object line_configuration {
	name LC300;
	conductor_A OH100;
	conductor_B OH100;
	conductor_C OH100;
	conductor_N OH101;
	spacing LS200;
}
object line_spacing {
	name LS200;
	distance_AB 2.5;
	distance_BC 4.5;
	distance_AC 7.0;
	distance_AN 5.656854;
	distance_BN 4.272002;
	distance_CN 5.0;
}
object overhead_line_conductor {
	name OH100;
	geometric_mean_radius 0.0244;
	resistance 0.306;
}
object overhead_line_conductor {
	name OH101;
	geometric_mean_radius 0.00814;
	resistance 0.592;
}
object transformer_configuration {
	name XFC400;
	connect_type 2;
	power_rating 6000;
	primary_voltage 12470;
	secondary_voltage 4160;
	resistance 0.01;
	reactance 0.06;
}
object transformer_configuration {
	name PoleTop;
	connect_type SINGLE_PHASE_CENTER_TAPPED;
	power_rating 400;
	powerC_rating 400;
	primary_voltage 2400;
	secondary_voltage 120;
	resistance 0.01;
	reactance 0.06;
}
object triplex_line_configuration {
      name triplex_line_config;
      conductor_1 Name_1_0_AA_triplex;
      conductor_2 Name_1_0_AA_triplex;
      conductor_N Name_1_0_AA_triplex;
      insulation_thickness 0.1;
      diameter 0.4;
}
object triplex_line_conductor {
      name Name_1_0_AA_triplex;
      resistance 0.57;
      geometric_mean_radius 0.0111;
}

object node {
	name Node1;
	bustype SWING;
	phases A|B|C;
	voltage_A +7199.558+0.000j;
	voltage_B -3599.779-6235.000j;
	voltage_C -3599.779+6235.000j;
	nominal_voltage 7199.558;
}

object overhead_line {
	name Link12;
	phases A|B|C;
	from Node1;
	to Node2;
	length 2000;
	configuration LC300;
	nominal_voltage 7199.558;
}

object node {
	name Node2;
	phases A|B|C;
	voltage_A +7199.558+0.000j;
	voltage_B -3599.779-6235.000j;
	voltage_C -3599.779+6235.000j;
	nominal_voltage 7199.558;
}

object transformer {
	name substation_transformer;
	phases A|B|C;
	from Node2;
	to substation_meter;
	configuration XFC400;
}

object meter {
      name substation_meter;
      phases ABCN;
      nominal_voltage 4160;
}

object overhead_line {
	name branch;
	phases A|B|C;
	from substation_meter;
	to Node3;
	length 2000;
	configuration LC300;
	nominal_voltage 2401.777;
}
object node {
	name Node3;
	phases A|B|C;
	voltage_A +2401.777+0.000j;
	voltage_B -1200.889-2080.000j;
	voltage_C -1200.889+2080.000j;
	nominal_voltage 4160;
}

object overhead_line {
	name branch1;
	phases A|B|C;
	from Node3;
	to Node4;
	length 2000;
	configuration LC300;
	nominal_voltage 4160;
}

object node {
	name Node4;
	phases A|B|C;
	voltage_A +2401.777+0.000j;
	voltage_B -1200.889-2080.000j;
	voltage_C -1200.889+2080.000j;
	nominal_voltage 4160;
}


//// here are the stuff I added

object transformer{
	name split_boi;
	phases CS;
	from Node4;
	to mr_meter1;
	configuration PoleTop;
}


object triplex_meter{
	name mr_meter1;
	phases CS;
	nominal_voltage 120;

}
// // using a schedule for demand
// schedule demand {
//      0-9 0 * * * 0.00;
//      10-19 0 * * * 0.00;
//      20-29 0 * * * 0.00;
//      30-39 0 * * * 0.00;
//      40-49 0 * * * 0.00;
//      50-59 0 * * * 0.00;
//      0-9 1 * * * 0.00;
//      10-19 1 * * * 0.00;
//      20-29 1 * * * 0.00;
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//      50-59 23 * * * 0.00;
// }

object player {
	name demand;
	file "water_draw.csv";
};

object house {
	name house1;
	// no need to specify phase used, inherits parent's phase
//  panel.power_factor 0.98;
	floor_area random.uniform(2500,100) sf;
	parent mr_meter1;

}

object waterheater {
	parent house1; // heater is inside the house
	name my_waterheater;
	// no need to specify phase used
	temperature 120;
	tank_volume 50;
	thermostat_deadband 2;
	heating_element_capacity 4.5 kW;
	water_demand demand.value;
	inlet_water_temperature 60;
	tank_UA 3.3;
	object recorder {
		name Nadine;
		interval 60;
		property is_waterheater_on, temperature, height, water_demand;
		file "wh.csv";
	}; // always put a semicolon for the curly bracket of a nested object

}

object recorder {
	name mr_recorder;
	parent mr_meter1;
	property measured_power.real, measured_current_1, measured_voltage_1; // current & voltage on split phase 1
	interval 600; // every 10 mins
	file output.csv;
}

object inverter {
	name example;
	// parent tlx_680_c_h_19_stmtr;
  parent mr_meter1;
	phases CS;
	inverter_type FOUR_QUADRANT;
	four_quadrant_control_mode LOAD_FOLLOWING;
	generator_status ONLINE;
	generator_mode CONSTANT_PQ;
  charge_on_threshold 5.0 kW; //when the load at the sense_object drops below this value the inverter starts to charge the battery.
  charge_off_threshold 7.0 kW; //when the battery is charging and the load at the sense_object rises above this value the inverter stops charging the battery.
  discharge_off_threshold 7.5 kW; //when the battery is discharging and the load at the sense_object drops below this value the inverter stops discharging the battery.
  discharge_on_threshold 9.0 kW; //when the load at the sense_object rises above this value the inverter starts to discharge the battery.
  max_discharge_rate 1 kW; //The maximum power output to demand from the battery when discharging.
  max_charge_rate 1 kW; //The maximum power input to the battery when charging.
  sense_object mr_meter1; //the sense_object must be a meter, triplex_meter, or transformer.
	// volt_var_control_lockout 60;
	inverter_efficiency 0.975;
	// V_base ${tlx_680_c_h_19};
	// rated_power 10000.000;
  rated_power 2000;
	// P_Out 0.000;
	// Q_Out 0.000;
	// V1 0.90;
	// Q1 0.70;
	// V2 0.95;
	// Q2 0.0;
	// V3 1.05;
	// Q3 0.00;
	// V4 1.10;
	// Q4 -0.8;
	object battery {
		name example_battery;
		nominal_voltage 48;
		battery_capacity 10000.0;
		state_of_charge 1.0000;
		use_internal_battery_model true;
		generator_mode CONSTANT_PQ;
		generator_status ONLINE;
		battery_type LI_ION;
		round_trip_efficiency 0.86;
		rated_power 6000.000;

	};
}
